*Heading
Kim et al. 2020
**
**	UNITS:	Length - meters, Time - sec, Angle - radians,
**		Temperature - Kelvin, Force - Newtons,
**		Stress - Newton/meter^2 = Pa, Mass - kilograms,
**		Density - kg/meter^3, Conductivity - Watt/m-K,
**		Specific Heat - J/m^3-K, Energy - Joules,
**	    Chemical potential - Joules/mole,
**		Fluid content - moles/volume
**		Charge - Coulombs, Electric potential - Volts
**
**
************************************************************************
**			PARAMETERS
************************************************************************
*Parameter
**
************************************************************************
**	SIMULATION PARAMETERS
**
** initial temperature (Kelvin)
theta0 = 298.0
**
************************************************************************
**  PHYSICAL CONSTANTS
**
** elementary charge (C)
e    = 1.6e-19
**
** Avogadro's number (1/mol)
Na   = 6.023e23
**
** universal gas constant (J/mol/K)
Rgas = 8.314
**
eNa  = e*Na
RT   = Rgas*theta0
**
************************************************************************
**
** 	GEOMETRY
**
** length of the body under consideration
Length = 1000.e-9
**
** area at the electrodes (m)
Area = 1.e-2*1.e-2
**
************************************************************************
**	MATERIAL PARAMETERS
**
**
**  MECHANICAL
**
** initial shear modulus (Pa)
Gshear = 350.e6
**
** locking stretch
lam_L  = 10.0
**
** bulk modulus (Pa)
Kbulk = Gshear
Kbulk_int = Gshear
**
**
**
**  ELECTROCHEMICAL
**
** initial voltage (V)
pphi0  = 0.0
**
** ion diffusivity (m2/s)
Dion = 1.e-14
**
**
** molar volume of positive ions (m3/mol)
OmegaP = 5.e-4
**
** maximum concentration of positive ions (mol/m3)
ccRpBar = 1.e5
**
** charge number of positive ions
zP = 1.0
**
** molar volume of positive ions (m3/mol)
OmegaN = OmegaP
**
** maximum concentration of positive ions (mol/m3)
ccRnBar = ccRpBar
**
** charge number of positive ions
zN = -1.0
**
*************************************
**
** 		TOP PART (AT)
**
**
** initial positive ion concentration (mol/m3)
ccRp0_top = 1.e-2
**
** initial non-dim. chemical potential of positive ions
MuP0_top = log(ccRp0_top/ccRpBar)
**
** initial negative ion concentration (mol/m3)
ccRn0_top = 1.0
**
** initial non-dim. chemical potential of negative ions
MuN0_top = log(ccRn0_top/ccRnBar)
**
** charge number of fixed groups
zFix_top = 1.0
**
** concentration of fixed charge groups (mol/m3)
ccRfix_top  = -ccRp0_top+ccRn0_top
**
*************************************
**
** 		BOTTOM PART (ES)
**
**
** initial positive ion concentration (mol/m3)
ccRp0_bot = 1.0
**
** initial non-dim. chemical potential of positive ions
MuP0_bot = log(ccRp0_bot/ccRpBar)
**
** initial negative ion concentration (mol/m3)
ccRn0_bot = 1.e-2
**
** initial non-dim. chemical potential of negative ions
MuN0_bot = log(ccRn0_bot/ccRnBar)
**
** charge number of fixed groups
zFix_bot = -1.0
**
** concentration of fixed charge groups (mol/m3)
ccRfix_bot  =  -ccRn0_bot + ccRp0_bot
**
*************************************
**
** 		INTERFACE (interpenetrated AT and ES)
**
**
** initial positive ion concentration (mol/m3)
ccRp0_int = 0.5
**
** initial non-dim. chemical potential of positive ions
MuP0_int = log(ccRp0_int/ccRpBar)
**
** initial negative ion concentration (mol/m3)
ccRn0_int = 0.5
**
** initial non-dim. chemical potential of negative ions
MuN0_int = log(ccRn0_int/ccRnBar)
**
** charge number of fixed groups
zFix_int = 0.0
**
** concentration of fixed charge groups (mol/m3)
ccRfix_int  = 1.e-2
**
**
***********************************
**
** electrolyte strength (mol/m3)
cE  = 0.5
**
** relative permittivity
epsilonR = 30.0
**
** dielectric permittivity of vacuum (F/m)
epsilon0 = 8.85e-12
**
** dielectric permittivity (F/m)
epsilon     = epsilonR*epsilon0
**
** the Debye length (m)
lambdaD = sqrt(epsilon*RT/(2.0*eNa**2.0*cE))
**
************************************************************************
**
** NON-DIMENSIONALIZING THE INITIAL CONDITIONS
**
Phi0  = pphi0*eNa/RT
**
** Note: the initial chemical potentials are already computed in their
** non-dimensional forms
**
************************************************************************
**
** FREQUENCY PARAMETERS
**
**
** frequency (Hz) will be assigned by "runEIS.py"
freq   = 1.0
**
** angular frequency (rad/s)
omega  = 2.0*3.14*freq
**
** period (s)
period = 1.0/freq
**
************************************************************************
**
**  NON-DIMENSIONAL SIMULATION TIME
**
** time factor (1/s)
timeFactor   = Dion/(lambdaD*Length)
**
** non-dimensional period for a given frequency
periodND     = period*timeFactor
**
** non-dimensional simulation time
FinalTime    = 3.0*periodND
**
t0Amp=-0.75*timeFactor
**
** non-dimensional angular frequency
omegaND = omega/timeFactor
**
************************************************************************
**
**	ELEMENT PARAMETERS
**
** number of body integration points
nInt  = 8
**
** number of surface integration points
nIntS = 4
**
** number of local sdv's
nlSdv = 5
**
** number of global sdv's
ngSdv = 4
**
** number of element variables
nVars = nInt*nlSdv
**
** number of properties (real)
nProps = 18
**
** number of integer properties
nJProps = 4
**
** Dummy Counter (Example: For 3500 Elements, set Dcount to 10000)
Dcount = 10000
**
scale=1.
**
**
************************************************************************
**
**		MODEL DEFINITION
**
*node, nset=nAll
1,    0.000000000,    0.000000000,    0.000000000
2,    10.000000000,    0.000000000,    0.000000000
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**
*User Element,Nodes=8,Type=U3,Iproperties=<nJProps>,Properties=<nProps>,Coordinates=3,Variables=<nVars>,Unsymm
1,2,3,11,12,13
*element, type=U3, elset=elAll
1,1,2,3,4,5,6,7,8
2,5,6,7,8,9,10,11,12
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**
*element, type=C3D8, elset=ElDummy
10001,1,2,3,4,5,6,7,8
10002,5,6,7,8,9,10,11,12
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**
*nset, nset=xzSymm
1,2,5,6,9,10
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**
*nset, nset=yzSymm
2,3,6,7,10,11
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**
*nset, nset=CenterFilament
2,6,10,14,18,22
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**
*elset, elset=Bottom
1,2,3,4,5,6
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*elset, elset=Interface
496,497,498,499,500,501,502,503,504,505
*elset, elset=Top
506,507,508,509,510,511
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*nset, nset=Bottom
1,2,3,4,5,6
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*nset, nset=Interface
1985,1986,1987,1988,1989,1990
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*nset, nset=Top
2021,2022,2023,2024,2025,2026
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**
*nset, nset=RightSide
3,4,7,8,11,12
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**
*nset, nset=TopFace
4001,4002,4003,4004
*nset, nset=MiddleLayer
2001,2002,2003,2004
*nset, nset=BottomFace
1,2,3,4
**
**
** Dummy element, just so we can have the coupled thermal-displacement step
*Node
999996,  0.0, 0.0
999997,  1.e-6, 0.0
999998,  1.e-6, 1.e-6
999999,  0.0, 1.e-6
*Nset, nset=extraElement
999996,999997,999998,999999
*Element, Type=CPE4T
999999,999996,999997,999998,999999
*Elset,elset=extraElement
999999
**
************************************************************************
**			INITIAL CONDITIONS
************************************************************************
**
*Initial conditions, type=temperature
Top,<Phi0>,<MuP0_top>,<MuN0_top>
Bottom,<Phi0>,<MuP0_bot>,<MuN0_bot>
Interface,<Phi0>,<MuP0_int>,<MuN0_int>
**
*Initial conditions, type=temperature
extraElement, 0.0
**
************************************************************************
**			MATERIAL DEFINITION
************************************************************************
**
** Material properties for gel material
**
*uel property,elset=Top
<eNa>,<RT>,<epsilon>,<zP>,<OmegaP>,<ccRp0_top>,<ccRpBar>,<zN>,
<OmegaN>,<ccRn0_top>,<ccRnBar>,<zFix_top>,<ccRfix_top>,<Gshear>,<Kbulk>,<lambdaD>,
<Length>,<cE>,<nlSdv>,<ngSdv>,<nInt>,<nIntS>
*uel property,elset=Bottom
<eNa>,<RT>,<epsilon>,<zP>,<OmegaP>,<ccRp0_bot>,<ccRpBar>,<zN>,
<OmegaN>,<ccRn0_bot>,<ccRnBar>,<zFix_bot>,<ccRfix_bot>,<Gshear>,<Kbulk>,<lambdaD>,
<Length>,<cE>,<nlSdv>,<ngSdv>,<nInt>,<nIntS>
*uel property,elset=Interface
<eNa>,<RT>,<epsilon>,<zP>,<OmegaP>,<ccRp0_int>,<ccRpBar>,<zN>,
<OmegaN>,<ccRn0_int>,<ccRnBar>,<zFix_int>,<ccRfix_int>,<Gshear>,<Kbulk>,<lambdaD>,
<Length>,<cE>,<nlSdv>,<ngSdv>,<nInt>,<nIntS>
**
** Dummy mesh material properties
**
*Solid section, elset=extraElement, material=Material-1
*Solid section, elset=ElDummy, material=Material-2
**
*Material, name=Material-1
*Elastic
1.e-20
*Conductivity
1.0
*Density
1.0
*Specific heat
1.0
**
*Material, name=Material-2
*User output variables
<ngSdv>
*Elastic
1.e-20
**
************************************************************************
**			AMPLITUDE DEFINITION
************************************************************************
**
*Amplitude, name=ampDispBC, definition=PERIODIC
1,            <omegaND>,          <t0Amp>,            1.75
             0.,            .75
*Amplitude, name=dispAmpPressHold,definition=tabular
0.0,0.0,	1.0,1.0,	5.0,1.0
**
************************************************************************
**			STEP DEFINITION
************************************************************************
*Step, Name=Leave, nlgeom=yes, inc=100000
*Coupled temperature-displacement, deltmx=100.0
1.e-2,1.0,1.e-8,1.0
*Controls, Parameters=Time Incrementation
,,,,,,,10,,,,,,
**
*restart, write, frequency=20
**
*Boundary
MiddleLayer,11,11,<Phi0>
MiddleLayer,3,3
xzSymm,2,2
yzSymm,1,1
**
**
*Boundary
extraElement,encastre
extraElement,11,11,0.0
**
*Output, field, frequency=2
*node output, nset=nAll
u,nt
*node output, nset=extraElement
u
*element output, elset=ElDummy
uvarm,le
**
*End Step
************************************************************************
*Step, Name=PressHold, nlgeom=yes, inc=100000
*Coupled temperature-displacement, deltmx=100.0
1.e-2,2.,1.e-8,0.1
*Controls, Parameters=Time Incrementation
,,,,,,,10,,,,,,
**
*restart, write, frequency=20
**
*Boundary,amplitude=dispAmpPressHold
RightSide,2,2,2.0
**
*End Step
************************************************************************
*Step, Name=Cycle, nlgeom=yes, inc=100000
*Coupled temperature-displacement, deltmx=100.0
1.e-2,<FinalTime>,1.e-8,0.1
*Controls, Parameters=Time Incrementation
,,,,,,,10,,,,,,
**
*restart, write, frequency=20
**
*Boundary,amplitude=ampDispBC
RightSide,2,2,2.0
**
*End Step
